# Calculate PID Controller Coefficients
# Given PID Controller Parameters (see Matlab Simulation):
KP := 4.947
KI := 2.1987*10^4
KD := 2.7827*10^-4
# Defining one parameter due to 1 degree of freedom:
R_1 := 10*10^3
# Calculate the missing parameters:
solve block
    # guess values
    C_I := 1*10^-9
    C_D := 10*10^-9
    R_2 := 100*10^3
    # constraints
    KP == R_2/R_1 + C_D/C_I
    KI == 1/(R_1*C_I)
    KD == R_2*C_D
    # solver
    [C_I; C_D; R_2] := find(C_I, C_D, R_2) = [4.54814e-9; 1.12498e-8; 24735]
end solve block
